# Aufgabe 1: Kartographie des Himmels
A_T := 1°*1° = 0.000304617 rad
A_H := 4*π*sr
n. := A_H/A_T = 41253
# Aufgabe 2: Dichte der Milchstraße
# a)
M_Θ := 1.99*10^30 kg
u := 1.661*10^-27 kg
m_H := 1.008*u
pc := 3.086*10^16 m
d := 50*10^3*pc
h := 700*pc
V := π*(d/2)^2*h = 4.03939e67 cm^3
V/pc^3 = 1.37445e12
ρ := 6*10^10*M_Θ/V = 2.95589e-24 gm/cm^3
n := ρ/m_H = 1.76546 cm^-3
# b)
r_DM := 50*10^3*pc
V_DM := 4/3*π*r_DM^3 = 1.53881e70 cm^3
V_DM/pc^3 = 5.23599e14  # beachten: das DM-Halo ist sphärisch (eigentlich triaxial), keine Scheibe
ρ_DM := 5.4*10^11*M_Θ/V = 2.6603e-23 gm/cm^3
# Aufgabe 3: Größe des Parsec
'' := (1/3600)°
π := 0.01*''
AE := 149597870700 m
# a)
a_Erde := 1*AE
D_Erde := a_Erde/tan(π) = 3.08568e15 km
# b)
a_Venus := 0.723*AE
D_Venus := a_Venus/tan(π) = 2.23094e15 km
# c)
a_Mars := (1.381 + 1.666)/2*AE
a_Mars/AE = 1.5235
D_Mars := a_Mars/tan(π) = 4.70103e15 km
# Aufgabe 4: Hipparcos
Δψ := 0.001*''
# a)
ψ := Δψ*10
D_max := a_Erde/tan(ψ) = 3.08568e18 m
D_max/pc = 99.9896
# b)
n := 0.12/pc^3
V := 4*π/3*D_max^3
N := n*V = 502497
# Das ist deutlich größer als die 22951 Sterne im Hipparcos Katalog mit Parallaxen > 10 m''. Bis
# zu 100 pc ist der Hipparcos Katalog natürlich nicht vollständig und viele Sterne fehlen.
# Die Anzahldichte der lokalen Sterne ergibt sich hier aus den 64 Sternen im Radius von 5 pc
# um die Sonne.
