# Aufgabe 1: Wasser in Molekülwolken
m := 70 kg
R_Erde := 6371 km
AE := 149597870700 m
r_Mond := 384400 km
V := m*50%/(10^-21 gm/cm^3*1/10^6) = 3.5e16 km^3
V = 3.5e31 cm^3
'' := 1°/3600
pc := 3.08567758149*10^16 m
V/(4/3*π*R_Erde^3) = 32311.5
# Würfelkantenlänge:
q := nthroot(V, 3) = 327106631 m
r_Mond = 384400000 m
# Aufgabe 2: Masse und Druck der Atmosphäre
# a)
A_Erde := 4*π*R_Erde^2 = 5.10064e14 m^2
m_Atmo := (10000 kg/m^2)*A_Erde = 5.10064e18 kg
# b)
V_Atmo := 4/3*π*((R_Erde + 100 km)^3 - R_Erde^3) = 5.18112e10 km^3
m_Ozeane := 75%*A_Erde*3.5 km*(1000 kg/m^3) = 1.33892e21 kg
p := m_Ozeane/m_Atmo*1 bar = 262.5 bar
p := m_Ozeane*g/A_Erde = 25742456 Pa
# Aufgabe 3: Doppelsternsystem α Cen
α := 17.1 ''
p := 0.758 ''
T := 80.1 yr
a_Bda_A := 1.22
D_Erde := 1 AE/tan(p) = 4.07081e16 m
D_Erde = 272117 AE
D_Erde = 1.31926 pc
a := atan(α)*D_Erde = 3.37483e12 m
a = 22.5594 AE
a = 0.000109371 pc
M_Θ := 1.98892*10^30 kg
m_Apm_B := M_Θ*a^3*(1 yr)^2/(T^2*(1 AE)^3) = 3.55904e30 kg
a(P, M) := nthroot(P^2*G*M/(4*π^2), 3)
a_A/a_B =  # error: Diese Variable ist nicht definiert. Prüfen Sie, ob die Beschriftung richtig festgelegt ist.; disabled
m_A(1 + a_A/a_B) = (m_A + m_B)  # error: Diese Variable ist nicht definiert. Prüfen Sie, ob die Beschriftung richtig festgelegt ist.; disabled
m_A := m_Apm_B/(1 + 1/a_Bda_A) = 1.95587e30 kg
m_B := m_A/a_Bda_A = 1.60317e30 kg
m_A/M_Θ = 0.983383
m_B/M_Θ = 0.806051
# alternativ: p=0.737'', alpha=17,59'' -> a=23.4 AE
# ma+mb=3.9*10^30kg
# mb=1.8*10^30kg=0.95ms
# ma=2.1*10^30kg=1.1ms
# Aufgabe 4: Quadratbogensekunde
1 sr/(1 ''*2*π/360°)^2 = 4.25452e10
1 rad/(1 '') = 206265
1 rad/1° = 57.2958
1 ''/(1 rad) = 4.84814e-6
1°/(1 rad) = 0.0174533
# Aufgabe 5: Magnitudendifferenz
m_V := -2.5*log(F_V/F_0)  # error: Diese Variable ist nicht definiert. Prüfen Sie, ob die Beschriftung richtig festgelegt ist.; disabled
F_AF_B(A, B) := 10^((A - B)/(-2.5))
# a)
F_AF_B(6, 1) = 0.01
# b)
F_AF_B(-26.7, -12.5) = 478630
