# [reference: Größen und Einheiten.mcdx]
# Aufgabe 1: Entfernungsmodul
M_V := 4.83
m(r) := M_V + 5*log(r/(10 pc))
# a)
m(8*10^3 pc) = 19.3454
# b)
m(2.5*10^6 ly) = 29.2525
# Aufgabe 2: Die nächstgelgene Zivilisation
V_Galaxis := π*(110000 ly)^2*9500 ly = 3.61126e14 ly^3
V_Galaxis = 1.04077e13 pc^3
d_Ziv := nthroot(V_Galaxis/10000, 3) = 3305.37 ly
d_Ziv = 1013.41 pc
# Aufgabe 4: Jupiter als Exoplanet
# a)
r_α := 1.32 pc
m_VSonne := -26.75
Δm := -2.5*log(r_α^2/(1 AE)^2) = -27.175
m_αSonne := m_VSonne - Δm = 0.424995
# b)
m_VJupiter := -2.4
r_Jupiter := 4.95 AE - 1 AE
M_VJupiter := m_VJupiter - 5*log(r_Jupiter/(10 pc)) = 26.1891
# c)
m_αJupiter := m_VJupiter + 2.5*log(r_α^2/r_Jupiter^2) = 21.792
# d)
r_JupiterMax := 5.46 AE
Δφ := atan(r_JupiterMax/r_α) = 0.00114899°
Δφ = 4.13636 ''
# e)
# Jupiter wird von der Sonne überstrahlt.
# Aufgabe 5: Zirkumpolare Sterne und Kulminationszeit
# a)
δ > 50°
δ > 90° - φ
# für immer sichtbar
φ > 90° - δ
δ_grenz := 50°
φ_grenz := 90° - δ_grenz = 40°
φ < φ_grenz
# b)
h_max(φ) := 90° - φ + δ
δ := 89° + 15*' + 51 ''  # error: Diese Variable ist nicht definiert. Prüfen Sie, ob die Beschriftung richtig festgelegt ist.
δ := 90
# c)
α_München := 1 hr*11.5°/15° = 46 min
t_Greenwich := 23 hr + 26*min + α_München - 1 hr = 23.2 hr
0.2 hr = 12 min
α_gesucht := t_Greenwich - 14 hr = 9.2 hr
α_gesucht*15°/(1 hr) = 138°  # E  # Japans Hauptinsel Honshu
t_gesucht := 14 hr + 9 hr = 23 hr
