# [reference: Größen und Einheiten.mcdx]
# Aufgabe 1: Strahlungsleistung von Planeten
A := 0.77
S_※ := 2609 W/m^2
σ_SB := 5.6704*10^-8 W/(m^2 K^4)
T_GG := ((1 - A)/4*S_※/σ_SB)^(1/4) = 226.794 K
# Aufgabe 2: CO2-Speicherung in Kalkstein
A_Zs := 4 km*4 km
h_Zs := 2 km
V_Zs := A_Zs*h_Zs/3 = 10.6667 km^3
V_Zs = 1.06667e16 cm^3
ρ_CaCO3 := 2.7 gm/cm^3
a_CO2 := 44.01 gm*mol^-1/(100.09 gm*mol^-1) = 0.439704
m_CO2 := V_Zs*ρ_CaCO3*a_CO2 = 1.26635e10 tonne
m_CO2Deutschland := 902*10^6*tonne  # (2014)
m_CO2Deutschland/m_CO2 = 0.0712284  # entspricht also rund 15 Jahren CO2-Austoß
# Aufgabe 3: Strahlungsleistung des Menschen
# a)
A_Körper := 1.5 m^2
T_Körper := 37 °C
P(T) := A_Körper*σ_SB*T^4
P_ab := P(T_Körper) = 787.031 W
# b)
P_auf := P(293 K) = 626.867 W
ΔP := P_auf - P_ab = -160.164 W
# Aufgabe 4: Die "Eislinie" in protoplanetaren Scheiben
# b)
L_Θ := 3.846*10^26 W
A := 0.5
T_GG := 140 K
D(L) := sqrt((1 - A)*L/(16*π*σ_SB*T_GG^4))
# vgl.
T_GG := (L/(16*π*D^2*σ_SB))^(1/4)  # disabled
D(L_Θ) = 419075040 km
D(L_Θ) = 2.80134 AE  # zwischen Mars und Jupiter
D(20*L_Θ) = 1.87416e9 km
D(20*L_Θ) = 12.528 AE  # zwischen Saturn und Uranus
# Aufgabe 5: Wiensches Verschiebungsgesetz
λ_max(T) := 2.90*(10^-3*T^-1) m*K
# a)
λ_max(5800 K) = 500 nm  # -> weiß
# b)
λ_max(3000 K) = 966.667 nm  # -> rot
# c)
λ_max(10000 K) = 290 nm  # -> blau
