# [reference: Größen und Einheiten.mcdx]
# Aufgabe 1: Luftmasse
# a)
AM(z) := 1/cos(z)
z(AM) := acos(1/AM)
z_max := z(1.5) = 48.1897°
z_min := z(1) = 0°
# Aufgabe 2: Moderne Teleskope
# a)
f := 120 m
D := 8 m
o := D/f = 0.0666667
o = 1*2/30
# b)
a := π*(39 m)^2/(π*(10 m)^2) = 15.21  # a~4^2
# Aufgabe 3: Auflösungsvermögen
α(λ, D) := λ/D*360°/(2*π)
α_Hubble := α(1150 Angstrom, 240 cm) = 0.00988352 ''
α_Spitzer := α(30000 Angstrom, 85 cm) = 0.727993 ''
α_Chandra := α(2 Angstrom, 120 cm) = 3.43775e-5 ''
D(α, λ) := λ/α*360°/(2*π)
D_min := D(1.38 '', 380 nm) = 5.67976 cm
# Aufgabe 4: Definition der Lichtstärke
cd := (1/683) W/sr
P := 4*π*cd = 0.0183988 W
n := P/(h*540*10^12 Hz) = 5.14209e16 1/s
# Aufgabe 5: Gleichgewichtstemperatur der Erde
T_GG(A) := ((1 - A)/4*F_Θ/σ_SB)^(1/4)
T_alt := T_GG(0.3) = 254.884 K
T_neu := T_GG(0.31) = 253.969 K
T_alt - T_neu = 0.915219 K
T_alt/T_neu = 1.0036
1 - T_alt/T_neu = -0.360366*1%
# alternativ:
a(A_alt, A_neu) := ((1 - A_alt)/(1 - A_neu))^(1/4)
a(30%, 31%) = 1.0036
