# Einheiten
ly := c*1 yr
AE := 149597870700 m
pc := 3.08567758149*10^16 m
' := 1°/60
'' := 1°/3600
mag := 1
u := 1.6605390*10^-27 kg
# Größen
r_Mond := 384400 km
R_Erde := 6371 km
M_Θ := 1.98892*10^30 kg
σ_SB := 5.6704*10^-8 W/(m^2 K^4)
L_Θ := 3.846*10^26 W
F_Θ := L_Θ/(4*π*(1 AE)^2) = 1367.57 W/m^2
